<?xml version="1.0" encoding="UTF-8"?>
<neuroml xmlns="http://www.neuroml.org/schema/neuroml2"
         xmlns:xsi="http://www.w3.org/2001/XMLSchema-instance"
         xsi:schemaLocation="http://www.neuroml.org/schema/neuroml2 http://neuroml.svn.sourceforge.net/viewvc/neuroml/NeuroML2/Schemas/NeuroML2/NeuroML_v2beta.xsd"
         id="IaF_GrC">

	<notes>NeuroML 2 file containing an abstract cell definition</notes>

	<iafRefCell id="IaF_GrC" leakReversal="-75mV" leakConductance="1.498nS" thresh="-40mV" reset="-63mV" C="3.22pF" refract="2ms"/>

</neuroml>
