<?xml version="1.0" encoding="UTF-8"?>
<neuroml xmlns="http://www.neuroml.org/schema/neuroml2" xmlns:xsi="http://www.w3.org/2001/XMLSchema-instance" xsi:schemaLocation="http://www.neuroml.org/schema/neuroml2 http://neuroml.svn.sourceforge.net/viewvc/neuroml/NeuroML2/Schemas/NeuroML2/NeuroML_v2beta.xsd" id="WardGoCToGrCGABA">

  <notes>NeuroML 2 file containing a single synapse.</notes>

  <stpSynapse id="WardGoCToGrCGABA"
	      gbase="0.3944 nS"
	      erev="-75 mV"
	      tauRise="2.1 ms"
	      tauDecay="23 ms">
    <stpMechanism type="tsodyksMarkramDepFacMechanism"
		  initReleaseProb="0.6846"
		  tauFac="11.45 ms"
		  tauRec="129.7 ms" />
    <notes>
      GABAR-mediated synapse between cerebellar Golgi and granule cell
      as described in Ward, D. R. Golgi cell mediated inhibition in
      the cerebellar granule cell layer. PhD thesis, University
      College London, 2012. Average over direct and spillover-only
      connections.

      Note that, because of how the STP model is defined, the 'gbase'
      parameter corresponds to the experimentally measured 'amplitude'
      divided by 'initReleaseProb' (0.3944nS=0.27nS/0.6846).
    </notes>
  </stpSynapse>

</neuroml>
