<Lems>

    <Target component="conductanceTrain"/>
    <!--Simulate granule cell model using as synaptic input the "spike
         train number 0 at 20 Hz" from Jason's experimental data. Save
         the resulting AMPA and (unblocked) NMDA conductance waveforms
         to external files so that they can be compared with other
         implementations of the same model (eg pure python, and
         hopefully NEURON soon)-->

    <Include file="NeuroMLCoreDimensions.xml"/>
    <Include file="Cells.xml"/>
    <Include file="Networks.xml"/>
    <Include file="Simulation.xml"/>

    <Include file="../../cellMechanisms/RothmanMFToGrCAMPA/RothmanMFToGrCAMPA.nml"/>
    <Include file="../../cellMechanisms/RothmanMFToGrCNMDA/RothmanMFToGrCNMDA.nml"/>

    <ComponentType name="dummyBlock"
		   extends="baseBlock">
      <Dynamics>
	<StateVariable name="scaling" dimension="none" exposure="scaling"/>
	<OnStart>
	  <StateAssignment variable="scaling" value="1"/>
	</OnStart>
      </Dynamics>
    </ComponentType>

    <TriExpBlockStpSynapse id="unblockedRothmanMFToGrCNMDA"
			   erev="0 mV"
			   directAmp1="17.00 nS"
			   directAmp2="2.645 nS"
			   directTauRise="0.8647 ms"
			   directTauDecay1="13.52 ms"
			   directTauDecay2="121.9 ms">
      <stpMechanism type="tsodyksMarkramDepFacMechanism"
		    initReleaseProb="0.03220"
		    tauFac="6.394 ms"
		    tauRec="236.1 ms" />
      <blockMechanism type="dummyBlock"/>
    </TriExpBlockStpSynapse>

    <iafRefCell id="IaF_GrC" leakReversal="-75mV" leakConductance="1.498nS" thresh="-40mV" reset="-63mV" C="3.22pF" refract="2ms"/>

    <spikeArray id="spikes">
      <spike id="0" time="83.47 ms"/>
      <spike id="1" time="112.42 ms"/>
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    </spikeArray>

    <network id="conductanceTrainNetwork">

        <extracellularProperties temperature="23.0 degC"/>

	<population id="spikeArrayPop" component="spikes" size="1"/>
        <population id="GrCs" component="IaF_GrC" size="1"/>

	<synapticConnection from="spikeArrayPop[0]" to="GrCs[0]" synapse="RothmanMFToGrCAMPA" destination="synapses"/>
	<synapticConnection from="spikeArrayPop[0]" to="GrCs[0]" synapse="unblockedRothmanMFToGrCNMDA" destination="synapses"/>
    </network>

    <Simulation id="conductanceTrain" length="2 s" step="0.025ms" target="conductanceTrainNetwork">
        <Display id="GrCs_v" title="GrCs, VOLTAGE" timeScale="1ms" xmin="-10.0" xmax="2020.0" ymin="-80.0" ymax="-35.0">
            <Line id="GrCs_v" timeScale="1ms" quantity="GrCs[0]/v" scale="1 mV" color="#000000"/>
        </Display>
        <Display id="conductances" title="AMPA and NMDA synaptic conductances" timeScale="1ms" xmin="-10.0" xmax="2020.0" ymin="-0.1" ymax="1">
            <Line id="gAMPA" timeScale="1ms" quantity="GrCs[0]/RothmanMFToGrCAMPA/g" scale="1 nS" color="#000000"/>
            <Line id="gNMDA" timeScale="1ms" quantity="GrCs[0]/unblockedRothmanMFToGrCNMDA/g" scale="1 nS" color="#04B431"/>
        </Display>
        <OutputFile id="of0" fileName="gAMPA_LEMS_20Hz_G0.dat">
            <OutputColumn id="g" quantity="GrCs[0]/RothmanMFToGrCAMPA/g"/>
        </OutputFile>
        <OutputFile id="of1" fileName="gNMDA_LEMS_20Hz_G0.dat">
            <OutputColumn id="g" quantity="GrCs[0]/unblockedRothmanMFToGrCNMDA/g"/>
        </OutputFile>
    </Simulation>

</Lems>
